c := 3*10^8
α := 0.2*0.115
N := 16
m := N/2
ii := 1, 2 .. N
L := 100
P_in
λ_mat[ii] := (1550 + 0.8*(ii - 1))*10^-9
λ_mat = [0; 1.55e-6; 1.5508e-6; 1.5516e-6; 1.5524e-6; 1.5532e-6; 1.554e-6; 1.5548e-6; 1.5556e-6; 1.5564e-6; 1.5572e-6; 1.558e-6; 1.5588e-6; 1.5596e-6; 1.5604e-6; 1.5612e-6; 1.562e-6]
A_eff := 50*10^-12
Δfo := 12.5*10^9
n2 := 2.68*10^-20
Δfe := 0.7*10^10
D_k := 17*10^-3
D_k_d := 0.08*10^6
h := 6.626*10^-34
E := 1.602*10^-19
η := 0.8
nsp := 1.4
α*L = 2.3
f_kan[ii] := c/λ_mat[ii]
Pijk(P_i, P_j, P_k, f_i, f_j, f_k, D) :=
    λ_k ← c/f_k
    γ ← (2*π*n2)/(λ_k*A_eff)
    Δβ ← (2*π*λ_k^2)*|f_i - f_k|*|f_j - f_k|*(D_k + λ_k^2*(|f_i - f_k| + |f_j - f_k|)*D_k_d/(2*c))/c
    η ← α^2*(1 + (4*e^(-α*L)*sin(Δβ*L/2)^2)/(1 - e^(-α*L))^2)/(α^2 + Δβ^2)
    Pijk ← η*D^2*γ^2*P_i*P_j*P_k*e^(-α*L)*((1 - e^(-α*L))*1000/α)^2/9
    Pijk
P_fwm_sum(P_in1k) :=
    P_fwm ← 0
    for ii ∈ 1 .. N
        for jj ∈ ii .. N
            kk ← ii + jj - m
            kk ← 0 if ((kk == ii) or (kk == jj) or (kk < 1) or (kk > N))
            D ← 3 if ii == jj
            D ← 6 if ii ≠ jj
            P_fwm ← P_fwm + Pijk(P_in1k, P_in1k, P_in1k, f_kan[ii], f_kan[jj], f_kan[kk], D) if kk ≠ 0
    P_fwm
G := 1/e^(-α*L)
P_fwm_sum(10^(0.1*(-20))*10^-3) = 1.09118e-16
b_m := η*E/(h*f_kan[m])
P_ase1 := 2*nsp*(G - 1)*h*f_kan[m]*Δfo
P_ase1 = 4.01363e-8
P_aseΣ(nus) := P_ase1*(nus + 1)
P_easeΣ(P_in1k, nus) := 4*b_m^2*P_in1k*P_aseΣ(nus)*Δfe/Δfo
P_fwmΣ(P_in1k, nus) := G*P_fwm_sum(P_in1k)*(nus + 1)
P_efwmΣ(P_in1k, nus) := 2*b_m^2*P_in1k*P_fwmΣ(P_in1k, nus)/8
q(P_in1k, nus) := b_m*P_in1k/sqrt(P_easeΣ(P_in1k, nus) + P_efwmΣ(P_in1k, nus))
q(10^(0.1*(-10))*10^-3, 0) = 33.3508
P_easeΣ(10^(0.1*10.5)*10^-3, 0) = 1.01471e-9
P_efwmΣ(10^(0.1*10.5)*10^-3, 0) = 4.33781e-9
P_fwmΣ(10^(0.1*10.5)*10^-3, 0) = 1.53736e-6
P_fwm_sum(10^(0.1*10.5)*10^-3) = 1.54134e-7
P_in1k := -25, -24 .. 35
P_in1k = [
    -25; -24; -23; -22; -21; -20; -19; -18; -17; -16
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]
q(10^(0.1*P_in1k)*10^-3, 0) = [
    5.93072; 6.65437; 7.46633; 8.37736; 9.39955; 10.5465; 11.8333; 13.2772; 14.8973; 16.715
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]
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